// COMSOL Multiphysics 5.6.0.280 model "Schottky_Contact.mph"
// Outline of the model tree

Parameters
  Va = 0[V]  // Voltage
  phim = 4.72[V]  // Work function
  th = 0.01[in]  // Thickness
  w = th  // Radius
  T0 = 298[K]  // Temperature
  ramp = 1

Couplings
  intop1: Integration on boundaries 5

Geometry
  geom1 "Geometry 1" (2D axisymmetric, length unit µm)
    r1: Rectangle | size = {w, th}
    r2: Rectangle | pos = {0, th -1 [um]}; size = {w, 1[um]}
    fin: Finalize "Form Union"

Materials
  mat1: Common "Si - Silicon" on all domains
    def "Basic"
      relpermittivity = 11.7
      thermalconductivity = 131[W/(m*K)]
      density = 2329[kg/m^3]
      heatcapacity = 700[J/(kg*K)]
    AroraMobilityModel
      mun0_ref_arora = 1252[cm^2/(V*s)]
      mup0_ref_arora = 407[cm^2/(V*s)]
      mun_min_ref_arora = 88[cm^2/(V*s)]
      mup_min_ref_arora = 54.3[cm^2/(V*s)]
      Nn0_ref_arora = 1.26e17[1/cm^3]
      Np0_ref_arora = 2.35e17[1/cm^3]
      alpha0_arora = 0.88
      beta1_arora = -0.57
      beta2_arora = -2.33
      beta3_arora = -2.33
      beta4_arora = -0.146
      Tref_arora = 300[K]
    PowerLawMobilityModel
      mun0_pl = 1448[cm^2/(V*s)]
      mup0_pl = 473[cm^2/(V*s)]
      alphan_pl = 2.33
      alphap_pl = 2.23
      Tref_pl = 300[K]
    Auger "Auger recombination"
      Cn = 2.8e-31[cm^6/s]
      Cp = 9.9e-32[cm^6/s]
    Direct "Direct recombination"
      C = 0[cm^3/s]
    SRH "Shockley-Read-Hall recombination"
      taun = 10[us]
      taup = 10[us]
    FletcherMobilityModel
      F1_fl = 1.04e21[1/(cm^1*V*s)]
      F2_fl = 7.45e13[1/cm^2]
      Tref_fl = 300[K]
    CaugheyThomasMobilityModel
      alphan0_ct = 1.11
      alphap0_ct = 1.21
      vn0_ct = 1e7[cm/s]
      vp0_ct = 8.37e6[cm/s]
      betan1_ct = 0.66
      betap1_ct = 0.17
      betan2_ct = -0.87
      betap2_ct = -0.52
      Tref_ct = 300[K]
    SemicondMaterial "Semiconductor material"
      Eg0 = 1.12[V]
      chi0 = 4.05[V]
      Nv = (T/300[K])^(3/2)*1.04e19[1/cm^3]
      Nc = (T/300[K])^(3/2)*2.8e19[1/cm^3]
      mun = 1450[cm^2/(V*s)]
      mup = 500[cm^2/(V*s)]
    LombardiSurfaceMobilityModel
      deltan_ls = 5.82e14[V/s]
      deltap_ls = 2.05e14[V/s]
      mun1_ls = 4.75e7[cm^2/(V*s)]
      mup1_ls = 9.93e7[cm^2/(V*s)]
      mun2_ls = 1.74e5[cm^2/(V*s)]
      mup2_ls = 8.84e5[cm^2/(V*s)]
      alphan_ls = 0.125
      alphap_ls = 0.0317
      Tref_ls = 1[K]
      Eref_ls = 1[V/cm]
      Nref_ls = 1[1/cm^3]
    ImpactIonization
      an = 0.426
      ap = 0.243
      bn = 4.81E5[V/cm]
      bp = 6.53E5[V/cm]
      cnii = 3.05E-4
      cpii = 5.35E-4
      dn = 6.86E-4
      dp = 5.67E-4
    SlotboomModel
      Eref_sb = 0.00692[V]
      Nref_sb = 1.3e17[1/cm^3]
      alpha_sb = 0.5
    JainRoulstonModel
      An_jr = 3.5e-8[V]
      Bn_jr = 0[V]
      Cn_jr = 0[V]
      Ap_jr = 3.5e-8[V]
      Bp_jr = 0[V]
      Cp_jr = 0[V]
      Nref_jr = 1[1/cm^3]
      alpha_jr = 0.5

Physics
  semi: Semiconductor on all domains
    dependent variable V
    Continuation.cp = ramp
    Continuation.DopingTrapDensityContinuation = Interface
    smm1: SemiconductorMaterialModel (default) | minput_temperature = T0
    axi1: AxialSymmetry (default)
    ins1: Insulation (default)
    zc1: ZeroCharge (default)
    ii1: InsulatorInterface (default)
    cont1: Continuity "Continuity/Heterojunction 1" (default)
    init1: init "Initial Values 1" (default)
    adm1: AnalyticDopingModel on all domains | impurityType = donor
    mc1: MetalContact on boundaries 5 | ContactType = Schottky; Phi = phim; V0 = Va
    mc2: MetalContact on boundaries 2

Mesh
  mesh1 "Mesh 1"
    size: MeshSizeDefault | hmax = 17; hmin = 0.0762; hcurve = 0.3; hgrad = 1.3
    map1: Map "Mapped 1" on entire geometry
      dis1: Distribution on boundaries 3, 7 | type = predefined; reverse = on; elemcount = 40; elemratio = 50
      dis2: Distribution on boundaries 1, 6 | type = predefined; elemcount = 50; elemratio = 100; symmetric = on
      dis3: Distribution on boundaries 5 | numelem = 10

Studies
  std1 "Study 1"
    stat: Stationary | useparam = on; pname = ramp; plistarr = 10^range(-6,2,0)
    stat2: Stationary
      useparam = on
      pname = Va
      plistarr = range(0.01,0.01,0.25)
      punit = V
      pcontinuationmode = no
      preusesol = yes

Solver configurations
  sol1 "Solution 1" (study std1)
    v1: Variables "Dependent Variables 1"
    s1: Stationary "Stationary Solver 1" | stol = 1.0E-6
      p1: Parametric | porder = constant
      fc1: FullyCoupled | linsolver = d1; initstep = 0.1; minsteprecovery = 0.001; maxiter = 50
      d1: Direct
    su1: StoreSolution "Solution Store 1"
    v2: Variables "Dependent Variables 2" | initmethod = sol; notsolmethod = sol
    s2: Stationary "Stationary Solver 2" | stol = 1.0E-6
      p1: Parametric | porder = constant
      fc1: FullyCoupled | linsolver = d1; initstep = 0.1; minsteprecovery = 0.001; maxiter = 50
      d1: Direct
  sol2 "Solution Store 1" (study std1)

Datasets
  dset1: Solution | solution = sol1
  dset2: Solution | solution = sol2
  rev1: Revolve2D "Revolution 2D 1" | data = dset1; revangle = 270

Tables
  tbl1: Table
    V_f (V) | J_f (A/cm^2)
    0.0105793 | 3.62e-05
    0.0151134 | 6.03e-05
    0.0196474 | 9.22e-05
    0.0324937 | 0.000187244
    0.0521411 | 0.000369541
    0.0657431 | 0.000651191
    0.0755668 | 0.00091482
    0.0929471 | 0.00175504
    0.11335 | 0.00377094
    0.128463 | 0.00645942
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
Plots
  pg1: PlotGroup2D "Electron Concentration (semi)" | data = dset1; dataisaxisym = on
    surf1: Surface | expr = semi.log10N
  pg2: PlotGroup2D "Hole Concentration (semi)" | data = dset1; dataisaxisym = on
    surf1: Surface | expr = semi.log10P
  pg3: PlotGroup2D "Electric Potential (semi)" | data = dset1; dataisaxisym = on
    surf1: Surface | expr = V
  pg4: PlotGroup3D "Electron Concentration (semi) 1" | data = rev1
    surf1: Surface | expr = semi.log10N
  pg5: PlotGroup3D "Hole Concentration (semi) 1" | data = rev1
    surf1: Surface | expr = semi.log10P
  pg6: PlotGroup3D "Electric Potential (semi) 1" | data = rev1
    surf1: Surface | expr = V
  pg7: PlotGroup1D "J vs. V" | data = dset1; xlabel = Va (V); ylabel = J (A/cm^2)
    tblp1: Table "Table Graph 1" | table = tbl1; legends = Reference
    glob1: Global | expr = intop1(semi.nJ)/intop1(1); unit = A/cm^2; legends = Model