// COMSOL Multiphysics 5.6.0.280 model "semiconductor_heterojunction_1d.mph"
// Outline of the model tree

Parameters
  sign = 1  // Sign of applied voltage
  Va = 0[V]  // Voltage
  ramp = 1  // Continuation parameter
  L = 5[um]  // Length
  T0 = 300[K]  // Temperature

Variables
  var1 "GaAs" on domains 1
    Eg = 1.42[V]
    chi = 4.06[V]
    er = 13.1
    me_star0 = 0.067*me_const
    mh_star0 = 0.48*me_const
    Nc0 = 2*(2*pi*me_star0*k_B_const*T0/h_const^2)^(3/2)
    Nv0 = 2*(2*pi*mh_star0*k_B_const*T0/h_const^2)^(3/2)
    mun0 = 7000[cm^2/(V*s)]
    mup0 = 300[cm^2/(V*s)]
    taun0 = 10[ns]
    taup0 = 10[ns]
    Doping = 1e15[1/cm^3]
  var2 "Al_0.25Ga_0.75As" on domains 2
    Eg = 1.74[V]
    chi = 3.80[V]
    er = 12.4
    me_star0 = 0.088*me_const
    mh_star0 = 0.56*me_const
    Nc0 = 2*(2*pi*me_star0*k_B_const*T0/h_const^2)^(3/2)
    Nv0 = 2*(2*pi*mh_star0*k_B_const*T0/h_const^2)^(3/2)
    mun0 = 2500[cm^2/(V*s)]
    mup0 = 150[cm^2/(V*s)]
    taun0 = 10[ns]
    taup0 = 10[ns]
    Doping = 1e16[1/cm^3]

Geometry
  geom1 "Geometry 1" (1D, length unit µm)
    i1: Interval | coord = {-L, 0}
    i2: Interval | coord = {0, L}
    fin: Finalize "Form Union"

Materials
  mat1: Common "Material 1" on all domains
    def "Basic"
      relpermittivity = er
    SemicondMaterial "Semiconductor material"
      Eg0 = Eg
      chi0 = chi
      Nv = Nv0
      Nc = Nc0
      mun = mun0
      mup = mup0
    SRH "Shockley-Read-Hall recombination"
      taun = taun0
      taup = taup0

Physics
  semi: Semiconductor on all domains
    dependent variable V
    LatticeProperties.T0 = T0
    Continuation.cp = ramp
    Continuation.DopingTrapDensityContinuation = Interface
    smm1: SemiconductorMaterialModel (default) | minput_temperature = T0
    ins1: Insulation (default)
    zc1: ZeroCharge (default)
    ii1: InsulatorInterface (default)
    cont1: Continuity "Continuity/Heterojunction 1" (default)
    init1: init "Initial Values 1" (default)
    tar1: TrapAssistedRecombination on all domains
    mc1: MetalContact on boundaries 1 | V0 = sign*Va
    mc2: MetalContact on boundaries 3
    adm1: AnalyticDopingModel "Donor doping (left)" on domains 1 | impurityType = donor; NDc = Doping
    adm2: AnalyticDopingModel "Donor doping (right)" on domains 2 | impurityType = donor; NDc = Doping
    adm3: AnalyticDopingModel "Acceptor doping (left)" on domains 1 | NAc = Doping
    adm4: AnalyticDopingModel "Acceptor doping (right)" on domains 2 | NAc = Doping
    cont2: Continuity "Continuity/Heterojunction 2" on boundaries 2
      HeteroModelSelection = 2
      ContinuationType = Interface

Mesh
  mesh1 "Mesh 1"
    size: MeshSizeDefault | hmax = 0.67; hmin = 0.003; hcurve = 0.3; hgrad = 1.3
    edg1: Edge on remaining entities
      dis1: Distribution on all domains | type = predefined; elemcount = 500; elemratio = 10; symmetric = on

Studies
  std1 "n-n : Continuous Quasi-Fermi Levels"
    stat: Stationary
      disabledphysics = {semi/adm3, semi/adm4, semi/cont2}
      useparam = on
      sweeptype = filled
      pname = {sign, Va}
      plistarr = {-1 1, range(0.05,0.05,1)}
      punit = {, V}
      preusesol = auto
  std2 "n-n : Thermionic Emission"
    stat: Stationary
      disabledphysics = {semi/adm3, semi/adm4}
      useinitsol = on
      initmethod = sol
      initstudy = std1
      useparam = on
      sweeptype = filled
      pname = {sign, Va}
      plistarr = {-1 1, range(0.05,0.05,1)}
      punit = {, V}
      preusesol = auto
  std3 "p-n : Thermionic Emission"
    semie: SemiconductorEquilibrium | disabledphysics = {semi/adm1, semi/adm4}
    stat: Stationary
      disabledphysics = {semi/adm1, semi/adm4}
      useparam = on
      sweeptype = filled
      pname = {sign, Va}
      plistarr = {-1 1, range(0.05,0.05,1.7)}
      punit = {, V}
  std4 "n-p : Thermionic Emission"
    stat: Stationary
      disabledphysics = {semi/adm2, semi/adm3}
      useparam = on
      pname = ramp
      plistarr = 1e-8 1e-6 1e-4 1e-2 0.1 0.25 0.5 0.75 1
    stat2: Stationary
      disabledphysics = {semi/adm2, semi/adm3}
      useparam = on
      sweeptype = filled
      pname = {sign, Va}
      plistarr = {1 -1, range(0.05,0.05,1.7)}
      punit = {, V}
      preusesol = auto

Solver configurations
  sol1 "Solution 1" (study std1)
    v1: Variables "Dependent Variables 1" | scalemethod = none
      comp1_Ne: Field "Electron solution variable (comp1.Ne)" | scalemethod = manual; scaleval = 1.0e22
      comp1_Ph: Field "Hole solution variable (comp1.Ph)" | scalemethod = manual; scaleval = 1.0e4
    s1: Stationary "Stationary Solver 1" | stol = 1E-10
      p1: Parametric | porder = constant
      fc1: FullyCoupled | linsolver = d1; initstep = 0.1; minsteprecovery = 0.001; maxiter = 50
      d1: Direct
  sol2 "Solution 2" (study std2)
    v1: Variables "Dependent Variables 1"
    s1: Stationary "Stationary Solver 1" | stol = 1.0E-10
      p1: Parametric | porder = constant
      fc1: FullyCoupled | linsolver = d1; initstep = 0.1; minsteprecovery = 0.001; maxiter = 50
      d1: Direct
  sol3 "Solution 3" (study std3)
    v1: Variables "Dependent Variables 1"
    s1: Stationary "Stationary Solver 1" | stol = 1.0E-6
      fc1: FullyCoupled | linsolver = d1; initstep = 0.1; minsteprecovery = 0.001; maxiter = 50
      d1: Direct
    su1: StoreSolution "Solution Store 1"
    v2: Variables "Dependent Variables 2" | initmethod = sol; notsolmethod = sol
    s2: Stationary "Stationary Solver 2" | stol = 1.0E-10
      p1: Parametric | porder = constant
      fc1: FullyCoupled | linsolver = d1; initstep = 0.1; minsteprecovery = 0.001; maxiter = 50
      d1: Direct
  sol4 "Solution Store 1" (study std3)
  sol5 "Solution 5" (study std4)
    v1: Variables "Dependent Variables 1"
    s1: Stationary "Stationary Solver 1" | stol = 1.0E-6
      p1: Parametric | porder = constant
      fc1: FullyCoupled | linsolver = d1; initstep = 0.1; minsteprecovery = 0.001; maxiter = 50
      d1: Direct
    su1: StoreSolution "Solution Store 2"
    v2: Variables "Dependent Variables 2" | initmethod = sol; notsolmethod = sol
    s2: Stationary "Stationary Solver 2" | stol = 1.0E-10
      p1: Parametric | porder = constant
      fc1: FullyCoupled | linsolver = d1; initstep = 0.1; minsteprecovery = 0.001; maxiter = 50
      d1: Direct
  sol6 "Solution Store 2" (study std4)

Datasets
  dset1: Solution | solution = sol1
  dset2: Solution | solution = sol2
  dset3: Solution | solution = sol3
  dset4: Solution | solution = sol4
  dset5: Solution | solution = sol5
  dset6: Solution | solution = sol6

Tables
  tbl1: Table "n-n : Cont."
    Va (V) | Current density (A/cm^2)
    0.0526316 | 4.37144
    0.0643275 | 4.86968
    0.0818713 | 5.42469
    0.108187 | 6.04296
    0.131579 | 6.58795
    0.157895 | 7.0287
    0.184211 | 7.49894
    0.207602 | 8.17523
    0.233918 | 8.53591
    0.254386 | 9.10699
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  tbl2: Table "p-n : TE"
    Voltage (V) | Current density (A/cm^2)
    0.107665 | 2.22e-10
    0.132492 | 2.51e-10
    0.15732 | 2.82e-10
    0.182136 | 3.06e-10
    0.206963 | 3.45e-10
    0.240043 | 3.73e-10
    0.277267 | 4.2e-10
    0.310348 | 4.55e-10
    0.343428 | 4.93e-10
    0.376508 | 5.33e-10
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  tbl3: Table "n-p : TE"
    Voltage (V) | Current density (A/cm^2)
    0.0916077 | 1.98e-10
    0.116573 | 2.23e-10
    0.145681 | 2.42e-10
    0.178968 | 2.84e-10
    0.212255 | 3.33e-10
    0.241387 | 3.91e-10
    0.270484 | 4.07e-10
    0.303759 | 4.59e-10
    0.34119 | 5.17e-10
    0.374465 | 5.83e-10
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
Plots
  pg1: PlotGroup1D "n-n : Jx Comparison" | data = none; xlabel = Va (V); ylabel = abs(Jx) (A/cm^2)
    tblp1: Table "Table Graph 1" | table = tbl1; legends = Reference Cont.
    tblp2: Table "Table Graph 2" | table = tbl1; legends = Reference TE
    ptgr1: PointGraph on boundaries 2 | data = dset1; expr = abs(semi.JX); unit = A/cm^2
    ptgr2: PointGraph on boundaries 2 | data = dset2; expr = abs(semi.JX); unit = A/cm^2
  pg2: PlotGroup1D "p-n : Jx Comparison" | data = dset1; xlabel = Va (V); ylabel = abs(Jx) (A/cm^2)
    tblp1: Table "Table Graph 1" | table = tbl2; legends = Reference TE
    ptgr1: PointGraph on boundaries 2 | data = dset3; expr = abs(semi.JX); unit = A/cm^2
  pg3: PlotGroup1D "n-p : Jx Comparison" | data = dset1; xlabel = Va (V); ylabel = abs(Jx) (A/cm^2)
    tblp1: Table "Table Graph 1" | table = tbl3; legends = Reference TE
    ptgr1: PointGraph on boundaries 2 | data = dset5; expr = abs(semi.JX); unit = A/cm^2
  pg4: PlotGroup1D "n-n : Energy Diagram" | data = dset2; xlabel = x-coordinate (µm); ylabel = Energy (eV)
    lngr1: LineGraph on all domains
      expr = semi.Ec_e
      unit = eV
      descr = Conduction band energy level
      xdata = expr
      xdataexpr = x
      legends = Ec
    lngr2: LineGraph on all domains
      expr = semi.Efn_e
      unit = eV
      descr = Electron quasi-Fermi energy level
      xdata = expr
      xdataexpr = x
      legends = Efn
    lngr3: LineGraph on all domains
      expr = semi.Efp_e
      unit = eV
      descr = Hole quasi-Fermi energy level
      xdata = expr
      xdataexpr = x
      legends = Efp
    lngr4: LineGraph on all domains
      expr = semi.Ev_e
      unit = eV
      descr = Valence band energy level
      xdata = expr
      xdataexpr = x
      legends = Ev
  pg5: PlotGroup1D "p-n : Energy Diagram" | data = dset3; xlabel = x-coordinate (µm); ylabel = Energy (eV)
    lngr1: LineGraph on domains 1, 2
      expr = semi.Ec_e
      unit = eV
      descr = Conduction band energy level
      xdata = expr
      xdataexpr = x
      legends = Ec
    lngr2: LineGraph on domains 1, 2
      expr = semi.Efn_e
      unit = eV
      descr = Electron quasi-Fermi energy level
      xdata = expr
      xdataexpr = x
      legends = Efn
    lngr3: LineGraph on domains 1, 2
      expr = semi.Efp_e
      unit = eV
      descr = Hole quasi-Fermi energy level
      xdata = expr
      xdataexpr = x
      legends = Efp
    lngr4: LineGraph on domains 1, 2
      expr = semi.Ev_e
      unit = eV
      descr = Valence band energy level
      xdata = expr
      xdataexpr = x
      legends = Ev
  pg6: PlotGroup1D "n-p : Energy Diagram" | data = dset5; xlabel = x-coordinate (µm); ylabel = Energy (eV)
    lngr1: LineGraph on domains 1, 2
      expr = semi.Ec_e
      unit = eV
      descr = Conduction band energy level
      xdata = expr
      xdataexpr = x
      legends = Ec
    lngr2: LineGraph on domains 1, 2
      expr = semi.Efn_e
      unit = eV
      descr = Electron quasi-Fermi energy level
      xdata = expr
      xdataexpr = x
      legends = Efn
    lngr3: LineGraph on domains 1, 2
      expr = semi.Efp_e
      unit = eV
      descr = Hole quasi-Fermi energy level
      xdata = expr
      xdataexpr = x
      legends = Efp
    lngr4: LineGraph on domains 1, 2
      expr = semi.Ev_e
      unit = eV
      descr = Valence band energy level
      xdata = expr
      xdataexpr = x
      legends = Ev